*Heading
 Linear Elastic Skew Plate. 20kPa Load.
** Job name: SkewPlate Model name: Model-1
** Generated by: Abaqus/CAE 6.12-1
*Preprint, echo=NO, model=NO, history=NO, contact=NO
**
** PARTS
**
*Part, name=Plate
*Node
      1,          0.5, -0.288675129,           0.
      2,          0.5, -0.750555336,           0.
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*Element, type=S8R5
 1,   1,   7,  39,  24,  79,  80,  81,  82
 2,   7,   8,  40,  39,  83,  84,  85,  80
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*Nset, nset=_PickedSet18, internal, generate
   1,  215,    1
*Elset, elset=_PickedSet18, internal, generate
  1,  60,   1
*Nset, nset=Set-2, generate
   1,  215,    1
*Elset, elset=Set-2, generate
  1,  60,   1
*Orientation, name=Ori-1
0.866025403784438,          0.5,           0.,         -0.5, 0.866025403784438,           0.
3, 0.
** Section: PlateSection
*Shell General Section, elset=Set-2, material=Metal, orientation=Ori-1
0.008,
*End Part
**
**
** ASSEMBLY
**
*Assembly, name=Assembly
**
*Instance, name=Plate-1, part=Plate
*End Instance
**
*Nset, nset=MidSpan, instance=Plate-1
  1,  2,  7,  8,  9, 10, 79, 83, 86, 89, 92
*Elset, elset=MidSpan, instance=Plate-1
  1,  2,  3,  4,  5, 31, 32, 33, 34, 35
*Nset, nset=EndA, instance=Plate-1
   5,   6,  30,  31,  32,  33, 206, 209, 211, 213, 215
*Elset, elset=EndA, instance=Plate-1, generate
 56,  60,   1
*Nset, nset=EndB, instance=Plate-1
   3,   4,  16,  17,  18,  19, 140, 143, 145, 147, 149
*Elset, elset=EndB, instance=Plate-1, generate
 26,  30,   1
*Nset, nset=Set-4, instance=Plate-1
   3,   4,  16,  17,  18,  19, 140, 143, 145, 147, 149
*Elset, elset=Set-4, instance=Plate-1, generate
 26,  30,   1
*Nset, nset=Set-5, instance=Plate-1
   5,   6,  30,  31,  32,  33, 206, 209, 211, 213, 215
*Elset, elset=Set-5, instance=Plate-1, generate
 56,  60,   1
*Elset, elset=_Surf-1_SPOS, internal, instance=Plate-1, generate
  1,  60,   1
*Surface, type=ELEMENT, name=Surf-1
_Surf-1_SPOS, SPOS
*Nset, nset="_T-Plate-1-Datum csys-1", internal
Set-4,
*Transform, nset="_T-Plate-1-Datum csys-1"
0.866025403784438,          0.5,           0.,         -0.5, 0.866025403784438,           0.
*End Assembly
**
** MATERIALS
**
*Material, name=Metal
*Elastic
 3e+10, 0.3
** ----------------------------------------------------------------
**
** STEP: Apply pressure
**
*Step, name="Apply pressure"
Uniform pressure (20 kPa) load
*Static
1., 1., 1e-05, 1.
**
** BOUNDARY CONDITIONS
**
** Name: Fix left end Type: Displacement/Rotation
*Boundary
Set-5, 1, 1
Set-5, 2, 2
Set-5, 3, 3
Set-5, 4, 4
Set-5, 5, 5
Set-5, 6, 6
** Name: Rail boundary condition Type: Displacement/Rotation
*Boundary
Set-4, 2, 2
Set-4, 3, 3
Set-4, 4, 4
Set-4, 5, 5
Set-4, 6, 6
**
** LOADS
**
** Name: Load-1   Type: Pressure
*Dsload
Surf-1, P, 20000.
**
** OUTPUT REQUESTS
**
*Restart, write, frequency=0
**
** FIELD OUTPUT: F-Output-1
**
*Output, field, variable=PRESELECT
**
** HISTORY OUTPUT: H-Output-1
**
*Output, history, variable=PRESELECT
*End Step
