*Heading
 Linear Elastic Steel Connecting Lug
** Job name: Lug Model name: Model-1
** Generated by: Abaqus/CAE 6.12-1
*Preprint, echo=NO, model=NO, history=NO, contact=NO
**
** PARTS
**
*Part, name=Lug
*Node
      1,  0.075000003, 0.0500000007,           0.
      2,  0.075000003, 0.0250000004,           0.
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*Element, type=C3D20R
  1,   80,  267,  447,  227,    1,   29,  187,   52,  576,  575,  574,  573,  577,  578,  579,
      580,  582,  581,  583,  584
  2,  267,  268,  448,  447,   29,   30,  188,  187,  587,  586,  585,  575,  588,  589,  590,
      578,  581,  591,  592,  583
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*Nset, nset=Set-1, generate
    1,  2025,     1
*Elset, elset=Set-1, generate
   1,  339,    1
** Section: LugSection
*Solid Section, elset=Set-1, material=Steel
,
*End Part
**
**
** ASSEMBLY
**
*Assembly, name=Assembly
**
*Instance, name=Lug-1, part=Lug
*End Instance
**
*Nset, nset=_PickedSet4, internal, instance=Lug-1
    3,    4,    6,    7,   10,   11
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*Elset, elset=_PickedSet4, internal, instance=Lug-1
  31,  32,  33,  64,  65,  66
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*Elset, elset=__PickedSurf5_S4, internal, instance=Lug-1
 234, 235, 248, 249, 250, 259, 260, 261, 262, 263, 264
*Elset, elset=__PickedSurf5_S3, internal, instance=Lug-1, generate
 236,  239,    1
*Elset, elset=__PickedSurf5_S1, internal, instance=Lug-1, generate
 328,  339,    1
*Surface, type=ELEMENT, name=_PickedSurf5, internal
__PickedSurf5_S4, S4
__PickedSurf5_S3, S3
__PickedSurf5_S1, S1
*End Assembly
**
** MATERIALS
**
*Material, name=Steel
*Elastic
 2e+11, 0.3
** ----------------------------------------------------------------
**
** STEP: LugLoad
**
*Step, name=LugLoad
Apply uniform pressure to the hole
*Static
1., 1., 1e-05, 1.
**
** BOUNDARY CONDITIONS
**
** Name: Fix left end Type: Symmetry/Antisymmetry/Encastre
*Boundary
_PickedSet4, ENCASTRE
**
** LOADS
**
** Name: Pressure Load   Type: Pressure
*Dsload
_PickedSurf5, P, 5e+07
**
** OUTPUT REQUESTS
**
*Restart, write, frequency=0
**
** FIELD OUTPUT: F-Output-1
**
*Output, field
*Node Output
CF, U
*Element Output, directions=YES
NFORC, S
**
** HISTORY OUTPUT: H-Output-1
**
*Output, history, variable=PRESELECT
*End Step
